# ============================================================
# orig_1type: ⚠ 빌드 대조 — 원본 1-type 그대로 (출력 경로만 변경)
#
# ⚠⚠ **빌드 대조다.**  원본 heckel/input_SE_heckel_300.liggghts 와
#    **출력 경로 말고는 한 글자도 다르지 않다** (1-type 그대로).
#    윈도우 재설치로 옛 LIGGGHTS 바이너리가 사라졌으므로, 기준선이 옛 기록과
#    안 맞을 때 그 원인이 **type 리팩터**인지 **다른 빌드**인지 가르려면
#    이 런이 있어야 한다.  이것 없이 base 만 돌리면 두 원인이 섞인다.
#
# ⚠ 단 하나 더 바뀐 것: 템플릿 de-escape (이중 중괄호 → LIGGGHTS 변수 표기).
#   원본은 Python .format() 미렌더 상태라 LIGGGHTS 가 input.cpp:505 로 죽는다.
#   13런 **전부에 똑같이** 적용되므로 대조는 유효하다.
#   ⚠ 이 주석에 그 리터럴을 안 적는 이유 — LIGGGHTS 는 주석 줄에도 변수 치환을
#     시도할 수 있어서 예시를 적는 순간 그 줄이 같은 오류를 낸다.
# ============================================================
atom_style      granular
atom_modify     map array sort 0 0
boundary        p p f
newton          off
soft_particles  yes
communicate     single vel yes
units           si

variable target_press equal 0.300
variable r_SE    equal 0.5e-3
variable dt      equal 1.0e-6
variable plate_margin equal 0.003
timestep        ${dt}

region reg_box block 0.0 0.05 0.0 0.05 -0.01 1.0 units box
create_box      1 reg_box
neighbor        0.002 bin
neigh_modify    delay 0 check yes

fix m1 all property/global youngsModulus peratomtype 0.135e7
fix m2 all property/global poissonsRatio peratomtype 0.30
fix m3 all property/global coefficientRestitution peratomtypepair 1 0.3
fix m4 all property/global coefficientFriction peratomtypepair 1 0.5
fix m5 all property/global coefficientRollingFriction peratomtypepair 1 0.1
fix m6 all property/global coefficientMaxElasticStiffness peratomtypepair 1 5.0
fix m7 all property/global coefficientAdhesionStiffness peratomtypepair 1 1.0e6
fix m8 all property/global coefficientPlasticityDepth peratomtypepair 1 0.005
fix m9 all property/global characteristicVelocity scalar 2.0

pair_style      gran model hooke/hysteresis tangential history rolling_friction cdt
pair_coeff      * *

compute strs all stress/atom
compute ke   all ke/atom
compute cpl all pair/gran/local pos id force force_normal force_tangential torque contactArea delta contactPoint

fix zwall_bot all wall/gran model hooke/hysteresis tangential history rolling_friction cdt primitive type 1 zplane 0.0

fix pts1 all particletemplate/sphere 32452843 atom_type 1 density constant 2000 radius constant ${r_SE}
fix pdd_mix all particledistribution/discrete 49979687 1 pts1 1.0

region reg_mix block 0.0 0.05 0.0 0.05 0.005 0.035 units box
print "====== INSERTING PARTICLES (oat_orig_1type, seed=78049) ======"
fix ins_mix all insert/pack seed 78049 distributiontemplate pdd_mix &
    maxattempt 15000 insert_every once overlapcheck yes all_in no &
    vel constant 0.0 0.0 -0.5 &
    region reg_mix &
    volumefraction_region 0.281
run 1
unfix ins_mix

shell mkdir post_oat_orig_1type
thermo_style    custom step atoms ke cpu
thermo          1000

print "====== PHASE 1: SETTLING ======"
fix integr all nve/sphere
fix gravi all gravity 98.1 vector 0.0 0.0 -1.0
fix damp all viscous 1.0e-5
compute zmax all reduce max z
shell mkdir restart_oat_orig_1type
restart 50000 restart_oat_orig_1type/restart_settling_*.bin
run 200000

write_restart restart_oat_orig_1type/restart_after_settling.bin
thermo_style    custom step atoms c_zmax
thermo          1
run 1
variable z_max equal c_zmax
variable plate_z equal ${z_max}+${r_SE}+${plate_margin}
print "====== PLATE HEIGHT: ${plate_z} ======"

print "solid plate" file plate_oat_orig_1type.stl screen no
print "facet normal 0 0 -1" append plate_oat_orig_1type.stl screen no
print "outer loop" append plate_oat_orig_1type.stl screen no
print "vertex 0.0 0.0 ${plate_z}" append plate_oat_orig_1type.stl screen no
print "vertex 0.05 0.05 ${plate_z}" append plate_oat_orig_1type.stl screen no
print "vertex 0.05 0.0 ${plate_z}" append plate_oat_orig_1type.stl screen no
print "endloop" append plate_oat_orig_1type.stl screen no
print "endfacet" append plate_oat_orig_1type.stl screen no
print "facet normal 0 0 -1" append plate_oat_orig_1type.stl screen no
print "outer loop" append plate_oat_orig_1type.stl screen no
print "vertex 0.0 0.0 ${plate_z}" append plate_oat_orig_1type.stl screen no
print "vertex 0.0 0.05 ${plate_z}" append plate_oat_orig_1type.stl screen no
print "vertex 0.05 0.05 ${plate_z}" append plate_oat_orig_1type.stl screen no
print "endloop" append plate_oat_orig_1type.stl screen no
print "endfacet" append plate_oat_orig_1type.stl screen no
print "endsolid plate" append plate_oat_orig_1type.stl screen no

fix top_mesh all mesh/surface/stress file plate_oat_orig_1type.stl type 1 scale 1.0 reference_point 0 0 0
fix zwall_top all wall/gran model hooke/hysteresis tangential history rolling_friction cdt mesh n_meshes 1 meshes top_mesh
dump dmp_mesh all mesh/stl 5000 post_oat_orig_1type/mesh_*.stl top_mesh

print "====== PHASE 2: STABILIZE ======"
fix gravi all gravity 9.81 vector 0.0 0.0 -1.0
unfix damp
fix damp all viscous 0.5
variable pressMPa equal abs(f_top_mesh[3])/0.0025/1000000
thermo_style    custom step atoms ke cpu v_pressMPa
thermo 1000
run 200000

print "====== PHASE 3: COMPRESSION to 300 MPa ======"
dump dmp_atom all custom 5000 post_oat_orig_1type/atom_*.liggghts id type x y z radius vx vy vz c_strs[1] c_strs[2] c_strs[3] c_ke
fix_modify      zwall_top energy yes
variable press_speed equal 0.01
fix move_press all move/mesh mesh top_mesh linear 0.0 0.0 -${press_speed}
restart 50000 restart_oat_orig_1type/restart_compress_*.bin

label loop_press
    run 5000
    variable current_press equal "abs(f_top_mesh[3]) / 0.0025 / 1000000"
    print "Current Pressure: ${current_press} MPa (Target: ${target_press})"
    if "${current_press} < ${target_press}" then "jump SELF loop_press"

unfix move_press

print "====== PHASE 4: RELAXATION ======"
unfix damp
fix damp all viscous 1.0e-5
dump dmp_contact all local 10000 post_oat_orig_1type/contact_*.liggghts &
    c_cpl[1] c_cpl[2] c_cpl[3] c_cpl[4] c_cpl[5] c_cpl[6] c_cpl[7] c_cpl[8] &
    c_cpl[9] c_cpl[10] c_cpl[11] c_cpl[12] c_cpl[13] c_cpl[14] c_cpl[15] c_cpl[16] &
    c_cpl[17] c_cpl[18] c_cpl[19] c_cpl[20] c_cpl[21] c_cpl[22] c_cpl[23] c_cpl[24] &
    c_cpl[25] c_cpl[26]
run 100000
print "====== oat_orig_1type (300 MPa) Finished! ======"
