# 정확 좌표 프레임 덱 — scripts/mixer_exact_frames.py 가 LU637_ref_r2_s32452843/in.mixer 에서 만들었다 (손으로 고치지 말 것 · 강성 축 사전등록 §12-4 (나) · 보고 전용)
#   체크포인트 settled = /lustre/home/yonghoon/mixer_dev7_20260930_v26/LU637_ref_r2_s32452843/restart/settled.bin · 머리 step 1037429 · run 0 (적분 없음)
#   원 덱과 다른 곳: make_mixer_resume.transform (create_box → read_restart · 삽입 · 템플릿 · 분포 · write_restart · shell mkdir · 앞쪽 run 삭제)
#   + 원 dump · restart 삭제 · 마지막 run → hp (%.17g) · g6 (기본 %g) dump + run 0 · ⛔ 출력은 이 작업 폴더 (exact/) 에만 — 런 폴더에 쓰지 않는다
# 믹싱 드럼 — 표면에너지 스윕  (생성: scripts/make_mixer_deck.py)
# ⚠ 손으로 고치지 말 것 — 치수가 조성에서 유도된다.  조성을 바꾸면 생성기를 다시 돌린다.
#
# 조성 (활성 상만, 재정규화 wt%): AM_P 57.14 · AM_S 24.49 · SE 18.37
#   ⚠ 원 배합은 AM:SE:VGCF:PTFE = 80:18:1:1 · P:S = 7:3
#   ⚠ 빠진 상: VGCF, PTFE  (LAMMPS 단계에서 다룬다)
# CGF = 151  (소재 AM_P 9 µm → 모델 1.36 mm · SE 1 µm → 0.151 mm)
#   ★ 크기 비는 소재 그대로다: d_SE/d_AM_P = 0.111
# ⛔ 생산 scale=1000 규약을 쓰지 않는다 — 드럼은 중력 구동이라 중력/접촉 비가 깨진다.
# ⚠ 전단탄성률을 계산비용 때문에 낮췄다 (lischka 와 같은 조작) — 물성으로 인용 금지.
# ★ 강성 축 (사전등록 docs/reviews/mixer_highbo_stiffness_prereg_20260929.md §3 · Codex 6 차 HBR6-02 · 7 차 §5) — stiffen_se 20 · hold_bo_pairwise yes · dt_factor 1
#   SE 영률만 ×20: 1e+07 → 2e+08 Pa (AM_P · AM_S · 벽 영률 · 전 상 ν 불변 · AM/SE 영률비 103.7 → 5.185)
#   dt = 생성기 Rayleigh 규칙 (상별 최소) 을 이 덱의 E 로: 7.055e-07 s (soft · AM_S) → 2.62e-07 s (SE) · 정착 · 회전 물리 시간 · 바퀴 수 불변 — step · 덤프 간격은 새 dt 로 다시
#   점착 = 쌍별 명목 소겹침 점착 힘 척도 F0 = B³/A² = (9/2)π³R*²CED³/E*² 보존: CED_new,ij = CED_soft,ij · (E*_new,ij/E*_soft,ij)^(2/3)
#     soft = 현 생성기 행렬 (원소마다 역산 · min 재조립 없음) · E*_ij = [(1−ν_i²)/E_i + (1−ν_j²)/E_j]⁻¹ · 벽 R* = r_입자 · 선언된 벽 E · ν · 0 은 정확히 0
#   쌍               R* (m)     E*_soft          E*    CED_soft         CED F0_soft (N)      F0 (N)          F0 비
#   AM_P–AM_P   0.00034065 5.53067e+08 5.53067e+08  1.5691e+06  1.5691e+06 0.000204492 0.000204492 1.000000000000
#   AM_P–AM_S  0.000209631 5.53067e+08 5.53067e+08  1.5691e+06  1.5691e+06 7.74406e-05 7.74406e-05 1.000000000000
#   AM_P–SE      6.813e-05 1.08809e+07  1.8335e+08      150834      991385 1.87717e-05 1.87717e-05 1.000000000000
#   AM_P–WALL    0.0006813 6.58365e+08 6.58365e+08      851838      851838 9.23586e-05 9.23586e-05 1.000000000000
#   AM_S–AM_S    0.0001514 5.53067e+08 5.53067e+08  2.0561e+06  2.0561e+06 9.08851e-05 9.08851e-05 1.000000000000
#   AM_S–SE      6.056e-05 1.08809e+07  1.8335e+08      150834      991385  1.4832e-05  1.4832e-05 1.000000000000
#   AM_S–WALL    0.0003028 6.58365e+08 6.58365e+08 1.11622e+06 1.11622e+06 4.10483e-05 4.10483e-05 1.000000000000
#   SE–SE        3.785e-05 5.49451e+06  1.0989e+08      150834 1.11135e+06 2.27213e-05 2.27213e-05 1.000000000000
#   SE–WALL       7.57e-05 1.09153e+07 1.93616e+08     81885.2      556942  3.6847e-06  3.6847e-06 1.000000000000
#   WALL–WALL            —           —           —           0           0           —           —             —
#   ⚠ F0 보존 ≠ SJKR 동역학 전체 불변 — 분리 일 U_sep ∝ E*^(−2/3) · 접촉시간 · 접선 강성 · 감쇠 · 이력 · 영률비는 바뀐다 (§3 남기는 차이) · 이 표는 생성기 산술이다 — 실행 덱 검산은 scripts/mixer_deck_readback.py

atom_style      granular
atom_modify     map array sort 0 0
# ⚠ LIGGGHTS 는 SI 에서 `youngsModulus > 1e9` 를 **거부**한다
#   (`ERROR: youngsModulus <= 1e9 required for SI units`, global_properties.cpp:371).
#   우리 AM 1.037e9 · 벽 1.48e9 가 그 위다 — 2026-09-21 스모크 런이 실제로 여기서 멈췄다.
#   ⇒ 공식 override 를 쓴다.  dt 는 이미 **상별 Rayleigh 최소**로 잡으므로(plan) 안전 근거는 그쪽이다.
hard_particles  yes
boundary        f f f
newton          off
communicate     single vel yes
units           si
# processors — 섬유(multisphere) 없음 ⇒ MPI 가능.  `mpirun -np N` 이면 자동 분할

read_restart    /lustre/home/yonghoon/mixer_dev7_20260930_v26/LU637_ref_r2_s32452843/restart/settled.bin
variable        exact_step equal step
print           "EXACT_STEP ${exact_step} ckpt settled"
# ★ 메시 `type 4` = 벽 전용 타입 (강철 ÷135, 점착 = 입자값 ÷ 1.842).  옛 판은 type 2 = AM_S 를 빌려 썼다
neighbor        7.57e-05 bin
neigh_modify    delay 0

# --- 물성 (1:AM_P 2:AM_S 3:SE 4:VGCF 5:PTFE) ---
# ⚠ 영률은 ÷135 균일 연화값이다 (AM 1.037e9 · SE 1.0e7 · 벽 1.48e9).  물성으로 인용 금지.
#   비 104 는 실물(AM 1.4e11 / SE_eff 1.35e9)과 같다.  마지막 열 = 벽.
#   ⚠ 이 덱은 강성 축 덱이다: 위 문장의 영률 · 비는 soft 기준 — 이 덱의 SE 영률 = 2e+08 (머리 블록 참조)
fix m1 all property/global youngsModulus peratomtype 1.037e+09 1.037e+09 2e+08 1.48e+09
fix m2 all property/global poissonsRatio peratomtype 0.25 0.25 0.30 0.30
# ★ 마찰 = hare2026 세트 (μ_s 0.9 · μ_r 0.075) — Bo 3.0 앵커를 정의한 조건.  압연 덱과 다른 것은 정합이다.
fix m3 all property/global coefficientRestitution peratomtypepair 4 &
    0.3 0.3 0.3 0.3 &
    0.3 0.3 0.3 0.3 &
    0.3 0.3 0.3 0.3 &
    0.3 0.3 0.3 0.3
fix m4 all property/global coefficientFriction peratomtypepair 4 &
    0.9 0.9 0.9 0.9 &
    0.9 0.9 0.9 0.9 &
    0.9 0.9 0.9 0.9 &
    0.9 0.9 0.9 0.9
fix m5 all property/global coefficientRollingFriction peratomtypepair 4 &
    0.075 0.075 0.075 0.075 &
    0.075 0.075 0.075 0.075 &
    0.075 0.075 0.075 0.075 &
    0.075 0.075 0.075 0.075
# ★ 스윕 축 — 표면에너지 대리 (SJKR, J/m³).  **팔 LU637: 개발 탐색 dev-u · 균일 γ 배율 — LC 의 9 비영 CED × 14.422496 (SE 쪽 Bo_code 637.32 = 0.212 × 3000) — 10-02 · 10-03 개발 M 열람 뒤 정함 · 확인 팔 아님**
# ⚠ 이 블록만 팔마다 다르다.  나머지는 한 글자도 안 바뀐다.
fix mC all property/global cohesionEnergyDensity peratomtypepair 4 &
    1.5691e+06 1.5691e+06 991385 851838 &
    1.5691e+06 2.0561e+06 991385 1.11622e+06 &
    991385 991385 1.11135e+06 556942 &
    851838 1.11622e+06 556942 0
fix m9 all property/global characteristicVelocity scalar 2.0

# ⚠ cohesion 은 tangential 뒤 · rolling_friction 앞 (순서가 실재하는 제약)
pair_style      gran model hertz tangential history cohesion sjkr rolling_friction cdt
pair_coeff      * *
timestep        2.62e-07
fix             gravi all gravity 9.81 vector 0.0 0.0 -1.0

# --- 기구 (STL 은 튜토리얼 Mixer 원본을 scale 로 줄여 쓴다) ---
fix Drum  all mesh/surface file Drum.stl  type 4 scale 0.0262754
fix Front all mesh/surface file Front.stl type 4 scale 0.0262754
fix Back  all mesh/surface file Back.stl  type 4 scale 0.0262754
fix walls all wall/gran model hertz tangential history cohesion sjkr rolling_friction cdt &
    mesh n_meshes 3 meshes Drum Front Back

# --- 입자 ---

# ★ §24 층상 삽입 ① — AM 을 원통 전체에 넣는다 (정착 ① 로 바닥에 깔린다).  분율은 층 안 mass%.


# ⚠⚠ **적분기는 둘 다 필요하다** (2026-09-19 실측으로 확정)
#   `fix multisphere` 는 **강체만** 적분한다 — 평범한 구는 `body_[i] < 0` 로 건너뛴다.
#   이 줄 하나만 두고 돌렸더니 AM·SE 47,309 개가 **얼어붙은 조각상**이었다:
#   KE 가 삽입값에서 한 번도 안 움직였고 E0 과 E4 팔이 H/R 까지 동일했다.
#   ★ 직접 잰 것 — 평구 하나를 중력 아래 2,000 스텝 두니 z 가 0.02 그대로였다.
#   `nve/sphere` 를 얹으면 자유낙하가 정확히 복구되고(vz = −g·t),
#   섬유 결합거리는 0.48000/0.48000/0.96000 mm 로 **소수 5자리까지 불변**이며,
#   섬유 궤적은 nve 가 강체를 건드리지 않는 판과 **부동소수점까지 동일**하다
#   (`multisphere` 가 매 스텝 강체 상태를 다시 덮어쓴다 ⇒ 이중적분 피해 0).
fix integrS all nve/sphere        # ★ 평범한 구 (AM_P·AM_S·SE)

compute rke all erotate/sphere
thermo_style custom step atoms ke c_rke vol
thermo 5000
thermo_modify lost ignore norm no

# ★★ 체크포인트 — 측정런은 6,102,533 스텝(실측 ~21.8 step/s 에서 **5일**)인데 덱에 `restart` 가
#   한 줄도 없었다.  재부팅·OOM 한 번에 런 전체가 0 으로 돌아간다 (13 런이면 하나쯤 난다).
#   두 파일을 **번갈아** 써서 쓰다 죽어도 직전 것이 남는다 (디스크 ~40 MB/런).
#   ⚠ 궤적은 안 바뀐다 — I/O 뿐이다 (골든 해시는 그래서 재생성한다).
#   ★ 드럼은 축대칭이라 재시작 때 `fix move/mesh` 의 회전 위상이 0 으로 돌아가도 **기하가 같다**
#     — ps45 플래튼(2026-09-21, 재부양 7.8 mm)과 달리 이 덱에는 그 함정이 없다.
# ⚠ `mol` 은 `fix multisphere` 가 있어야 할당된다 (LIGGGHTS-PUBLIC fix_multisphere.cpp:175; 없으면
#   dump_custom.cpp:1058 "Dumping an atom property that isn't allocated" 로 **즉시 죽는다** — 자가 리뷰 R-1)

# ① 채우고 정착 — ⚠ KE 가 떨어진 뒤에 회전을 시작한다 (정착 전에 돌리면 지표가 뒤집힌다)
#   정착 0.272 s = 낙하 26.3 mm · e 0.3 에서
#   유도한 t_ff·(1+e)/(1−e) 의 2배.  ⛔ 상수 20000 step 을 쓰지 않는다.
#   ⚠ 그래도 잰 뒤 φ(포락) 경고를 확인할 것 — 식은 홑 입자의 튐만 센다.
# ★ §24 층상 삽입 ② — 정착 ① 뒤, SE 를 AM 침대 **위** 블록에 붓는다 (정착 ② 시작 시 삽입).
#   AM 침대 윗면 추정: V_AM 333 mm³ / pack 0.60 → 세그먼트 높이 6.55 mm → z_top -6.59 mm
#   블록 z ∈ [-5.22, 10.25] mm · |y| ≤ 0.6R (원 안) · x ±0.45L

# ★ 정착 끝 상태를 남긴다 — 회전 중 죽어도 정착(0.272 s)을 다시 안 돈다

# ② 회전 2 바퀴 @ 75 rpm  (임계 261 rpm · Fr 0.083)
fix mvD all move/mesh mesh Drum  rotate origin 0 0 0 axis 1. 0. 0. period 0.799562
fix mvF all move/mesh mesh Front rotate origin 0 0 0 axis 1. 0. 0. period 0.799562
fix mvB all move/mesh mesh Back  rotate origin 0 0 0 axis 1. 0. 0. period 0.799562
# ★ 정확 좌표 덤프 — 같은 step 두 벌: hp = %.17g (double 왕복 · 정확 값) · g6 = LIGGGHTS 기본 %g (판독기가 런 덤프에서 보는 형식 · 에뮬레이션 대조)
#   ⚠ dump_modify format = LIGGGHTS-PUBLIC 3.x 옛 문법 (한 줄 형식 · 공개 소스 판독 · 바이너리 실측 전) — 안 먹으면 read 가 TECH
dump hp all custom 1 exact/hp_*.liggghts id type x y z radius
dump_modify hp format "%d %d %.17g %.17g %.17g %.17g"
dump g6 all custom 1 exact/g6_*.liggghts id type x y z radius
# run 0 = 적분 없음 — 덤프의 위치 = 체크포인트의 double 그대로
run 0
