# ============================================================
# ps_7_3_r45 DEMP-01 감쇠 가지 실험 — 0 단계 문법 시험 (t0)
#   생성: make_branch_decks.py (손으로 고치지 말 것 — 생성기를 고치고 다시 만든다 · SHA256SUMS)
#   출발: read_restart ${ckpt} = restart_compress_3100000.bin (ibb 원 런 · 압축 중 마지막 체크포인트 · step 3100000)
#         sha256 82234bea543ae369043f54d4379c6451cdab5a404213c0ecf0a698638bf4b3ee · 80,807,696 B
#   꼴  : r8 재개 덱 (input_ps_7_3_r45_r8.liggghts) 그대로 + 표지 블록 (# >>> block … / # <<< block …) = r8 에 없는 줄
#   변수: run_branch.sh 가 -var 로 준다 — ckpt (체크포인트) · out (이 런의 새 폴더) · plate_stl (판 STL · 자료는 restart 에서 온다)
#   t0 = 0 단계 문법 시험 (수 분 · 판정에 쓰지 않는다): r8 머리 → G1 (run 0) → 압축 고리 한 덩어리 (목표를 0 으로 두어 5000 step 뒤 나온다)
#        → 멈춤 스냅숏 → 이완 블록 200 step → 끝 스냅숏 (top_mesh) → 서보 전환 → 서보 유지 500 step × 2 → 끝 스냅숏 (서보)
#        → 요약 → 서보 점검 → 가드 정지 경로를 일부러 탄다.  arm 덱의 블록을 **같은 글자로** 다 지나간다 (make_branch_decks.py --selftest).
# ============================================================

# --- 1. General Settings ---
atom_style      granular
atom_modify     map array sort 0 0
boundary        p p f
newton          off
soft_particles  yes
communicate     single vel yes
units           si

# --- 2. Variables & Domain ---
variable target_press equal 0.30          # 300 MPa × 0.001
variable r_AM_P  equal 4.5e-3            # AM_P r=4.5μm → Sim 4.5mm
variable r_AM_S  equal 2.0e-3            # AM_S r=2μm → Sim 2mm
variable r_SE    equal 0.5e-3            # SE r=0.5μm → Sim 0.5mm
variable dt      equal 1.0e-6
variable plate_margin equal 0.003
timestep        ${dt}

# RVE: 50×50 μm → Sim 0.05×0.05 m
processors * * 1

read_restart    ${ckpt}

neighbor        0.002 bin
neigh_modify    delay 0 check yes

# --- 3. Material Properties (Type 1:AM_P, 2:AM_S, 3:SE) ---
# AM: E=140 GPa → Sim 1.4e8 Pa, ν=0.25
# SE: E=1.35 GPa → Sim 0.135e7 Pa (소성변형 보정), ν=0.30
fix m1 all property/global youngsModulus peratomtype 1.4e8 1.4e8 0.135e7
fix m2 all property/global poissonsRatio peratomtype 0.25 0.25 0.30

fix m3 all property/global coefficientRestitution peratomtypepair 3 &
    0.3 0.3 0.3 &
    0.3 0.3 0.3 &
    0.3 0.3 0.3

fix m4 all property/global coefficientFriction peratomtypepair 3 &
    0.5 0.5 0.5 &
    0.5 0.5 0.5 &
    0.5 0.5 0.5

fix m5 all property/global coefficientRollingFriction peratomtypepair 3 &
    0.2 0.2 0.1 &
    0.2 0.2 0.1 &
    0.1 0.1 0.1

fix m6 all property/global coefficientMaxElasticStiffness peratomtypepair 3 &
    1.5 1.5 3.0 &
    1.5 1.5 3.0 &
    3.0 3.0 5.0

fix m7 all property/global coefficientAdhesionStiffness peratomtypepair 3 &
    1.0e5 1.0e5 2.0e5 &
    1.0e5 1.0e5 2.0e5 &
    2.0e5 2.0e5 1.0e6

fix m8 all property/global coefficientPlasticityDepth peratomtypepair 3 &
    0.05 0.05 0.01 &
    0.05 0.05 0.01 &
    0.01 0.01 0.005

fix m9 all property/global characteristicVelocity scalar 2.0

# --- 4. Contact Model ---
pair_style      gran model hooke/hysteresis tangential history rolling_friction cdt
pair_coeff      * *

compute strs all stress/atom
compute ke   all ke/atom
compute cpl all pair/gran/local pos id force force_normal force_tangential torque contactArea delta contactPoint

# --- 5. Wall (Bottom) ---
fix zwall_bot all wall/gran model hooke/hysteresis tangential history rolling_friction cdt primitive type 1 zplane 0.0

# --- 6. Templates & Distribution --- (r8 와 같이 생략: compress 체크포인트에는 type 1 · 2 · 3 원자가 다 있다)

# --- 8. Output ---
# (r8 의 `shell mkdir -p post_ps_7_3_r45` 는 뺐다 — 출력 폴더는 run_branch.sh 가 만든다 · LIGGGHTS shell mkdir 는 -p 도 폴더 이름으로 만든다)
thermo_style    custom step atoms ke cpu
thermo          1000

# --- 9. 압축 단계 fix 재선언 (r8 그대로 · r8 주석의 "Phase 1: Settling" 은 원 덱에서 따온 이름일 뿐) ---
fix integr all nve/sphere
fix gravi all gravity 9.81 vector 0.0 0.0 -1.0
fix damp all viscous 0.5

fix top_mesh all mesh/surface/stress file ${plate_stl} type 1 scale 1.0 reference_point 0 0 0
fix zwall_top all wall/gran model hooke/hysteresis tangential history rolling_friction cdt mesh n_meshes 1 meshes top_mesh

dump dmp_mesh all mesh/stl 5000 ${out}/post/mesh_*.stl top_mesh

variable pressMPa equal abs(f_top_mesh[3])/0.0025/1000000
thermo_style    custom step atoms ke cpu v_pressMPa
thermo 1000

print "====== PHASE 3: COMPRESSION (Speed 0.01) ======"
dump dmp_atom all custom 5000 ${out}/post/atom_*.liggghts id type x y z radius vx vy vz c_strs[1] c_strs[2] c_strs[3] c_ke
fix_modify      zwall_top energy yes

variable press_speed equal 0.01
fix move_press all move/mesh mesh top_mesh linear 0.0 0.0 -${press_speed}

restart 50000 ${out}/restart/restart_compress_*.bin
# >>> block guard_init — 가지 기준값 · 기록 (r8 에 없음 · 읽기 · 판정 전용 · 역학 불변)
variable br_arm string t0
variable gamma_comp string 0.5
variable summary_file string ${out}/branch_summary.txt
# equal 변수는 쓸 때마다 다시 계산된다 — 가지 시작 값은 즉시 치환으로 숫자를 박아 얼린다 (br_step0 · br_n0v)
variable br_step_now equal step
variable br_step0 equal ${br_step_now}
if "${br_step0} != 3100000" then "print 'BRANCH_ABORT step=${br_step0} — 기대 3100000 (체크포인트가 다르다)'" "quit"
variable br_atoms_now equal atoms
variable br_n0v equal ${br_atoms_now}
variable g_amin equal ${br_n0v}-50
variable pz_branch equal 0.111302
variable F_target equal 750.0
region rg_below block INF INF INF INF INF 0.0 units box
region rg_above block INF INF INF INF ${pz_branch} INF units box
variable g_leak equal count(all,rg_below)+count(all,rg_above)
variable br_leak0 equal ${g_leak}
variable ke_ref equal 1.695918e-05
variable ke_prev equal ${ke_ref}
variable ke_abs_comp equal 100*${ke_ref}
variable ke_floor_comp equal 10*${ke_ref}
variable comp_win equal 0
variable ke_abs_comp_win equal 0.1
variable comp_n equal 0
variable comp_max equal 40
variable g_reason string none
variable g_step equal step
variable g_atoms equal atoms
variable g_pz equal ${pz_branch}
variable g_F equal 0.0
variable g_ke equal ${ke_ref}
variable g_leakd equal 0
variable current_press equal 0.0
print "BRANCH_START arm=${br_arm} step=${br_step0} atoms=${br_n0v} leak0=${br_leak0} gamma_comp=${gamma_comp} plate_z_deck=${pz_branch}"
print "step,phase,plate_z_deck,press_deckMPa,force_N,ke_J,atoms,leak_delta" file ${out}/branch_trace.csv screen no
# <<< block guard_init

# >>> block t0_g1 — G1: 재개 첫 setup (step · 원자 수 정확 · KE 1e-6 · docs/resume_ckpt_procedure_20260927.md §3)
run 0
variable t0_n equal atoms
variable t0_ke0 equal ke
variable t0_g1 equal abs(${t0_ke0}/${ke_ref}-1.0)
print "T0_G1 step=${br_step0} atoms=${t0_n} ke=${t0_ke0} rel=${t0_g1} (기준 r8 로그 3100000 KE 1.695918e-05 · 원자 160420)"
if "(${t0_g1} <= 1.0e-6) && (${t0_n} == 160420)" then "print 'T0_G1 PASS'" else "print 'T0_G1 FAIL'"
# t0 만: 목표를 0 으로 두어 압축 고리가 한 덩어리 (5000 step) 뒤 나오게 한다 — 고리 글자는 arm 과 같다
variable target_press equal 0.0
# <<< block t0_g1

# >>> block comp_loop — r8 압축 고리 그대로 (run 5000 · 압력 판정 0.30) + 덩어리마다 가드 · 기록 (run 사이 · 역학 불변)
label loop_press
    run 5000
    variable current_press equal "abs(f_top_mesh[3]) / 0.0025 / 1000000"
    print "Current Pressure: ${current_press} MPa (Target: ${target_press})"
    variable comp_n equal ${comp_n}+1
    variable g_step equal step
    variable g_atoms equal atoms
    variable g_ke equal ke
    variable g_F equal abs(f_top_mesh[3])
    variable g_pz equal ${pz_branch}-${press_speed}*${dt}*(${g_step}-${br_step0})
    region rg_above delete
    region rg_above block INF INF INF INF ${g_pz} INF units box
    variable g_leakd equal ${g_leak}-${br_leak0}
    variable g_kelim equal 10*${ke_prev}
    print "${g_step},comp,${g_pz},${current_press},${g_F},${g_ke},${g_atoms},${g_leakd}" append ${out}/branch_trace.csv screen no
    if "${g_atoms} < ${g_amin}" then "variable g_reason string atoms_lost" "jump SELF guard_stop"
    if "${g_leakd} > 100" then "variable g_reason string leak" "jump SELF guard_stop"
    if "(${comp_n} <= ${comp_win}) && (${g_ke} > ${ke_abs_comp_win})" then "variable g_reason string ke_abs_win" "jump SELF guard_stop"
    if "(${comp_n} > ${comp_win}) && (${g_ke} > ${ke_abs_comp})" then "variable g_reason string ke_abs" "jump SELF guard_stop"
    if "(${comp_n} > ${comp_win}) && (${g_ke} > ${g_kelim}) && (${g_ke} > ${ke_floor_comp})" then "variable g_reason string ke_jump" "jump SELF guard_stop"
    if "${comp_n} >= ${comp_max}" then "variable g_reason string comp_budget" "jump SELF guard_stop"
    variable ke_prev equal ${g_ke}
    if "${current_press} < ${target_press}" then "jump SELF loop_press"
# <<< block comp_loop

# >>> block t0_g3 — 한 덩어리 뒤 (3105000) 원자 수 · 판 압력 5 % (G3 의 첫 정규 줄 3101000 대조는 run_branch.sh 가 로그로 한다)
variable target_press equal 0.30
variable t0_p1 equal ${current_press}
variable t0_g3 equal abs(${t0_p1}/0.29712724-1.0)
print "T0_G3 step=${g_step} atoms=${g_atoms} press_deckMPa=${t0_p1} rel=${t0_g3} (기준 r8 로그 3105000 0.29712724)"
if "(${t0_g3} <= 0.05) && (${g_atoms} == 160420)" then "print 'T0_G3 PASS'" else "print 'T0_G3 FAIL'"
# 판 높이 공식 (가지 시작 값이 얼었는가): 3105000 = 0.111302 − 0.01 × 1e-6 × 5000 = 0.111252 · run_branch.sh 가 stop 메시 덤프와도 대조한다
variable t0_pzerr equal abs(${g_pz}-0.111252)
print "T0_PZ plate_z_deck=${g_pz} expect=0.111252 err=${t0_pzerr}"
if "${t0_pzerr} <= 1.0e-12" then "print 'T0_PZ PASS'" else "print 'T0_PZ FAIL'"
# <<< block t0_g3

# >>> block stop_snap — 멈춘 step 의 상태 (원자 · 접촉 · 판) · run 0 = setup 만 (적분 없음 · 역학 불변) · restart
unfix move_press
variable br_S equal ${g_step}
variable br_pz_S equal ${g_pz}
variable br_P_S equal ${current_press}
variable br_F_S equal ${g_F}
variable br_h_S equal ${br_pz_S}*1000
print "BRANCH_STOP arm=${br_arm} step=${br_S} plate_z_deck=${br_pz_S} thickness_um=${br_h_S} press_deckMPa=${br_P_S} force_N=${br_F_S}"
print "${br_S},stop,${br_pz_S},${br_P_S},${br_F_S},${g_ke},${g_atoms},${g_leakd}" append ${out}/branch_trace.csv screen no
dump dmp_atom_stop all custom 5000 ${out}/stop/atom_*.liggghts id type x y z radius vx vy vz c_strs[1] c_strs[2] c_strs[3] c_ke
dump_modify dmp_atom_stop first yes
dump dmp_contact_stop all local 5000 ${out}/stop/contact_*.liggghts &
    c_cpl[1] c_cpl[2] c_cpl[3] c_cpl[4] c_cpl[5] c_cpl[6] c_cpl[7] c_cpl[8] &
    c_cpl[9] c_cpl[10] c_cpl[11] c_cpl[12] c_cpl[13] c_cpl[14] c_cpl[15] c_cpl[16] &
    c_cpl[17] c_cpl[18] c_cpl[19] c_cpl[20] c_cpl[21] c_cpl[22] c_cpl[23] c_cpl[24] &
    c_cpl[25] c_cpl[26]
dump_modify dmp_contact_stop first yes
dump dmp_mesh_stop all mesh/stl 5000 ${out}/stop/mesh_*.stl top_mesh
dump_modify dmp_mesh_stop first yes
run 0
undump dmp_atom_stop
undump dmp_contact_stop
undump dmp_mesh_stop
write_restart ${out}/restart/restart_stop_${br_S}.bin
# <<< block stop_snap

# >>> block relax — r8 PHASE 4 그대로 (판 고정 · viscous 1e-5) · 경로 · 접촉 간격만 표지
print "====== PHASE 4: RELAXATION ======"
unfix damp
fix damp all viscous 1.0e-5
dump dmp_contact all local 10000 ${out}/post/contact_*.liggghts &
    c_cpl[1] c_cpl[2] c_cpl[3] c_cpl[4] c_cpl[5] c_cpl[6] c_cpl[7] c_cpl[8] &
    c_cpl[9] c_cpl[10] c_cpl[11] c_cpl[12] c_cpl[13] c_cpl[14] c_cpl[15] c_cpl[16] &
    c_cpl[17] c_cpl[18] c_cpl[19] c_cpl[20] c_cpl[21] c_cpl[22] c_cpl[23] c_cpl[24] &
    c_cpl[25] c_cpl[26]

run 200
# <<< block relax

# >>> block end_snap_top_mesh — 끝 상태 (원자 · 접촉 · 판) · run 0 · restart
variable g_step equal step
variable g_atoms equal atoms
variable g_ke equal ke
variable g_F equal abs(f_top_mesh[3])
variable current_press equal "abs(f_top_mesh[3]) / 0.0025 / 1000000"
variable g_pz equal ${br_pz_S}
region rg_above delete
region rg_above block INF INF INF INF ${g_pz} INF units box
variable g_leakd equal ${g_leak}-${br_leak0}
variable br_E equal ${g_step}
variable br_pz_E equal ${g_pz}
variable br_h_E equal ${br_pz_E}*1000
variable br_P_E equal ${current_press}
variable br_F_E equal ${g_F}
print "BRANCH_END_STATE arm=${br_arm} dir=end_relax step=${br_E} plate_z_deck=${br_pz_E} thickness_um=${br_h_E} press_deckMPa=${br_P_E} force_N=${br_F_E} atoms=${g_atoms} leak_delta=${g_leakd}"
print "${br_E},end_relax,${br_pz_E},${br_P_E},${br_F_E},${g_ke},${g_atoms},${g_leakd}" append ${out}/branch_trace.csv screen no
dump dmp_atom_end all custom 5000 ${out}/end_relax/atom_*.liggghts id type x y z radius vx vy vz c_strs[1] c_strs[2] c_strs[3] c_ke
dump_modify dmp_atom_end first yes
dump dmp_contact_end all local 5000 ${out}/end_relax/contact_*.liggghts &
    c_cpl[1] c_cpl[2] c_cpl[3] c_cpl[4] c_cpl[5] c_cpl[6] c_cpl[7] c_cpl[8] &
    c_cpl[9] c_cpl[10] c_cpl[11] c_cpl[12] c_cpl[13] c_cpl[14] c_cpl[15] c_cpl[16] &
    c_cpl[17] c_cpl[18] c_cpl[19] c_cpl[20] c_cpl[21] c_cpl[22] c_cpl[23] c_cpl[24] &
    c_cpl[25] c_cpl[26]
dump_modify dmp_contact_end first yes
dump dmp_mesh_end all mesh/stl 5000 ${out}/end_relax/mesh_*.stl top_mesh
dump_modify dmp_mesh_end first yes
run 0
undump dmp_atom_end
undump dmp_contact_end
undump dmp_mesh_end
write_restart ${out}/restart/restart_end_relax_${br_E}.bin
# <<< block end_snap_top_mesh

# >>> block servo_switch — 판을 서보로 바꾼다 (r8 에 없음 · arm B)
#   src/mesh_module_stress_servo.cpp (3d5c00f): sp = −target_val · 오차 = sp − F·axis · 판 속도 = −vel_max·kp·오차/|sp| (axis 방향) ·
#   |속도| ≤ vel_max.  axis 0 0 −1 · target_val +750 → 판이 받는 위 방향 힘 F < 750 N 이면 −z (아래) 로 간다 · 넘으면 위로.
#   move/mesh 와 같은 메시에 둘 수 없다 → 옛 판 (top_mesh) 을 지우고 같은 높이 (${br_pz_S}) 에 새 판을 만든다.
#   ⚠ 판–입자 접촉 이력 (접선 · hysteresis) 은 여기서 새로 시작한다 (fix wall/gran 을 다시 만들기 때문 · README §10).
variable servo_kp index 30
variable servo_vmax index 0.01
print "====== PHASE 4B: SERVO HOLD (target ${F_target} N · vel_max ${servo_vmax} · kp ${servo_kp}) ======"
undump dmp_mesh
unfix zwall_top
unfix top_mesh
print "solid plate_servo" file ${out}/plate_servo_stop.stl screen no
print "facet normal 0 0 -1" append ${out}/plate_servo_stop.stl screen no
print "outer loop" append ${out}/plate_servo_stop.stl screen no
print "vertex 0.0 0.0 ${br_pz_S}" append ${out}/plate_servo_stop.stl screen no
print "vertex 0.05 0.05 ${br_pz_S}" append ${out}/plate_servo_stop.stl screen no
print "vertex 0.05 0.0 ${br_pz_S}" append ${out}/plate_servo_stop.stl screen no
print "endloop" append ${out}/plate_servo_stop.stl screen no
print "endfacet" append ${out}/plate_servo_stop.stl screen no
print "facet normal 0 0 -1" append ${out}/plate_servo_stop.stl screen no
print "outer loop" append ${out}/plate_servo_stop.stl screen no
print "vertex 0.0 0.0 ${br_pz_S}" append ${out}/plate_servo_stop.stl screen no
print "vertex 0.0 0.05 ${br_pz_S}" append ${out}/plate_servo_stop.stl screen no
print "vertex 0.05 0.05 ${br_pz_S}" append ${out}/plate_servo_stop.stl screen no
print "endloop" append ${out}/plate_servo_stop.stl screen no
print "endfacet" append ${out}/plate_servo_stop.stl screen no
print "endsolid plate_servo" append ${out}/plate_servo_stop.stl screen no
fix plate_servo all mesh/surface/stress/servo file ${out}/plate_servo_stop.stl type 1 scale 1.0 com 0.025 0.025 ${br_pz_S} ctrlPV force axis 0.0 0.0 -1.0 target_val ${F_target} vel_max ${servo_vmax} kp ${servo_kp}
fix zwall_top all wall/gran model hooke/hysteresis tangential history rolling_friction cdt mesh n_meshes 1 meshes plate_servo
fix_modify zwall_top energy yes
dump dmp_mesh all mesh/stl 5000 ${out}/post_hold/mesh_*.stl plate_servo
unfix damp
fix damp all viscous 1.0e-5
variable pressMPa equal abs(f_plate_servo[3])/0.0025/1000000
undump dmp_atom
dump dmp_atom all custom 50000 ${out}/post_hold/atom_*.liggghts id type x y z radius vx vy vz c_strs[1] c_strs[2] c_strs[3] c_ke
restart 100000 ${out}/restart/restart_hold_*.bin
# <<< block servo_switch

# >>> block t0_hold_params — t0 만: 서보 유지를 500 step × 2 덩어리로 줄인다 (hold 블록의 index 기본값보다 먼저)
variable hold_chunk index 500
variable hold_max index 2
# <<< block t0_hold_params

# >>> block hold — 서보 유지 고리 (덩어리마다 가드 · 수렴 판정 · 기록)
#   수렴 = |F/750 − 1| ≤ conv_ferr 이고 덩어리 사이 판 이동 ≤ conv_dz (덱 m) 가 conv_need 번 이어짐 (hold_min 덩어리 뒤) · 아니면 hold_max 에서 멈춤
#   KE 가드: 처음 hold_win 덩어리는 판을 멈춘 원 런 이완과 같은 풀림 (원 런 최대 0.0764 J) 이 나오므로 1.0 J 만 본다 (README §7)
variable hold_chunk index 5000
variable hold_max index 300
variable hold_win equal 10
variable hold_min equal 10
variable ke_abs_win equal 1.0
variable ke_abs_hold equal 1.0e-2
variable ke_floor_hold equal 1.0e-3
variable F_max equal 2*${F_target}
variable conv_ferr equal 0.01
variable conv_dz equal 5.0e-6
variable conv_need equal 4
variable hold_n equal 0
variable conv_n equal 0
variable pz_prev equal ${br_pz_S}
variable hold_status string RUNNING
print "BRANCH_HOLD_PARAMS target_N=${F_target} vel_max=${servo_vmax} kp=${servo_kp} chunk=${hold_chunk} max_chunks=${hold_max} conv_ferr=${conv_ferr} conv_dz=${conv_dz} conv_need=${conv_need}"
label loop_hold
    run ${hold_chunk}
    variable hold_n equal ${hold_n}+1
    variable g_step equal step
    variable g_atoms equal atoms
    variable g_ke equal ke
    variable g_F equal f_plate_servo[3]
    variable g_pz equal f_plate_servo[12]
    variable current_press equal "abs(f_plate_servo[3]) / 0.0025 / 1000000"
    region rg_above delete
    region rg_above block INF INF INF INF ${g_pz} INF units box
    variable g_leakd equal ${g_leak}-${br_leak0}
    variable g_dz equal abs(${g_pz}-${pz_prev})
    variable g_ferr equal abs(${g_F}/${F_target}-1.0)
    variable g_kelim equal 10*${ke_prev}
    print "Hold ${hold_n}: step ${g_step} F ${g_F} N (target ${F_target}) plate_z ${g_pz} dz ${g_dz} KE ${g_ke}"
    print "${g_step},hold,${g_pz},${current_press},${g_F},${g_ke},${g_atoms},${g_leakd}" append ${out}/branch_trace.csv screen no
    if "${g_atoms} < ${g_amin}" then "variable g_reason string atoms_lost" "jump SELF guard_stop"
    if "${g_leakd} > 100" then "variable g_reason string leak" "jump SELF guard_stop"
    if "${g_ke} > ${ke_abs_win}" then "variable g_reason string ke_abs" "jump SELF guard_stop"
    if "(${hold_n} > ${hold_win}) && (${g_ke} > ${ke_abs_hold})" then "variable g_reason string ke_abs_late" "jump SELF guard_stop"
    if "(${hold_n} > ${hold_win}) && (${g_ke} > ${g_kelim}) && (${g_ke} > ${ke_floor_hold})" then "variable g_reason string ke_jump" "jump SELF guard_stop"
    if "${g_F} > ${F_max}" then "variable g_reason string servo_overshoot" "jump SELF guard_stop"
    if "(${g_ferr} <= ${conv_ferr}) && (${g_dz} <= ${conv_dz})" then "variable conv_n equal ${conv_n}+1" else "variable conv_n equal 0"
    variable pz_prev equal ${g_pz}
    variable ke_prev equal ${g_ke}
    if "(${conv_n} >= ${conv_need}) && (${hold_n} >= ${hold_min})" then "variable hold_status string CONVERGED" "jump SELF hold_done"
    if "${hold_n} >= ${hold_max}" then "variable hold_status string BUDGET_EXHAUSTED" "jump SELF hold_done"
    jump SELF loop_hold
label hold_done
print "BRANCH_HOLD_DONE arm=${br_arm} status=${hold_status} chunks=${hold_n} step=${g_step} F=${g_F} plate_z=${g_pz}"
# <<< block hold

# >>> block end_snap_plate_servo — 끝 상태 (원자 · 접촉 · 판) · run 0 · restart
variable g_step equal step
variable g_atoms equal atoms
variable g_ke equal ke
variable g_F equal abs(f_plate_servo[3])
variable current_press equal "abs(f_plate_servo[3]) / 0.0025 / 1000000"
variable g_pz equal f_plate_servo[12]
region rg_above delete
region rg_above block INF INF INF INF ${g_pz} INF units box
variable g_leakd equal ${g_leak}-${br_leak0}
variable br_E equal ${g_step}
variable br_pz_E equal ${g_pz}
variable br_h_E equal ${br_pz_E}*1000
variable br_P_E equal ${current_press}
variable br_F_E equal ${g_F}
print "BRANCH_END_STATE arm=${br_arm} dir=end step=${br_E} plate_z_deck=${br_pz_E} thickness_um=${br_h_E} press_deckMPa=${br_P_E} force_N=${br_F_E} atoms=${g_atoms} leak_delta=${g_leakd}"
print "${br_E},end,${br_pz_E},${br_P_E},${br_F_E},${g_ke},${g_atoms},${g_leakd}" append ${out}/branch_trace.csv screen no
dump dmp_atom_end all custom 5000 ${out}/end/atom_*.liggghts id type x y z radius vx vy vz c_strs[1] c_strs[2] c_strs[3] c_ke
dump_modify dmp_atom_end first yes
dump dmp_contact_end all local 5000 ${out}/end/contact_*.liggghts &
    c_cpl[1] c_cpl[2] c_cpl[3] c_cpl[4] c_cpl[5] c_cpl[6] c_cpl[7] c_cpl[8] &
    c_cpl[9] c_cpl[10] c_cpl[11] c_cpl[12] c_cpl[13] c_cpl[14] c_cpl[15] c_cpl[16] &
    c_cpl[17] c_cpl[18] c_cpl[19] c_cpl[20] c_cpl[21] c_cpl[22] c_cpl[23] c_cpl[24] &
    c_cpl[25] c_cpl[26]
dump_modify dmp_contact_end first yes
dump dmp_mesh_end all mesh/stl 5000 ${out}/end/mesh_*.stl plate_servo
dump_modify dmp_mesh_end first yes
run 0
undump dmp_atom_end
undump dmp_contact_end
undump dmp_mesh_end
write_restart ${out}/restart/restart_end_${br_E}.bin
# <<< block end_snap_plate_servo

# >>> block summary_servo — 요약 (key=value · run_branch.sh · analyze_branch.py 가 읽는다)
print "arm=${br_arm}" file ${summary_file} screen no
print "gamma_comp=${gamma_comp}" append ${summary_file} screen no
print "ckpt_step=${br_step0}" append ${summary_file} screen no
print "atoms_start=${br_n0v}" append ${summary_file} screen no
print "leak_start=${br_leak0}" append ${summary_file} screen no
print "stop_step=${br_S}" append ${summary_file} screen no
print "stop_plate_z_deck=${br_pz_S}" append ${summary_file} screen no
print "stop_thickness_um=${br_h_S}" append ${summary_file} screen no
print "stop_press_deckMPa=${br_P_S}" append ${summary_file} screen no
print "stop_force_N=${br_F_S}" append ${summary_file} screen no
print "hold_status=${hold_status}" append ${summary_file} screen no
print "hold_chunks=${hold_n}" append ${summary_file} screen no
print "hold_chunk_steps=${hold_chunk}" append ${summary_file} screen no
print "servo_kp=${servo_kp}" append ${summary_file} screen no
print "servo_vmax=${servo_vmax}" append ${summary_file} screen no
print "end_step=${br_E}" append ${summary_file} screen no
print "end_plate_z_deck=${br_pz_E}" append ${summary_file} screen no
print "end_thickness_um=${br_h_E}" append ${summary_file} screen no
print "end_press_deckMPa=${br_P_E}" append ${summary_file} screen no
print "end_force_N=${br_F_E}" append ${summary_file} screen no
print "atoms_end=${g_atoms}" append ${summary_file} screen no
print "leak_delta_end=${g_leakd}" append ${summary_file} screen no
print "guard=none" append ${summary_file} screen no
print "result=DONE" append ${summary_file} screen no
print "BRANCH_DONE arm=${br_arm} stop_step=${br_S} stop_thickness_um=${br_h_S} end_step=${br_E} end_thickness_um=${br_h_E} end_press_deckMPa=${br_P_E}"
# <<< block summary_servo

# >>> block t0_servo — 서보 점검: 판이 내려갔고 (vel_max 를 넘지 않았고) 힘 부호가 위 (+) 인가 · 그 뒤 가드 정지 경로를 일부러 탄다
variable t0_dz equal ${br_pz_S}-${br_pz_E}
variable t0_dzmax equal ${servo_vmax}*${dt}*${hold_n}*${hold_chunk}*1.000001
variable t0_Fs equal f_plate_servo[3]
print "T0_SERVO dz=${t0_dz} dzmax=${t0_dzmax} F_signed=${t0_Fs} target=${F_target} status=${hold_status}"
if "(${t0_dz} > 0.0) && (${t0_dz} <= ${t0_dzmax}) && (${t0_Fs} > 0.0) && (${t0_Fs} < ${F_target})" then "print 'T0_SERVO PASS'" else "print 'T0_SERVO FAIL'"
print "T0_DONE"
variable g_reason string t0_forced
variable summary_file string ${out}/branch_summary_forced_trip.txt
jump SELF guard_stop
# <<< block t0_servo

# >>> block guard_stop — 가드가 멈추면 여기로 온다 (restart + 요약 · 이어 돌리지 않는다)
jump SELF branch_end
label guard_stop
print "BRANCH_GUARD_TRIP arm=${br_arm} reason=${g_reason} step=${g_step} atoms=${g_atoms} ke=${g_ke} leak_delta=${g_leakd}"
print "${g_step},guard_${g_reason},${g_pz},${current_press},${g_F},${g_ke},${g_atoms},${g_leakd}" append ${out}/branch_trace.csv screen no
print "arm=${br_arm}" append ${summary_file} screen no
print "guard=${g_reason}" append ${summary_file} screen no
print "guard_step=${g_step}" append ${summary_file} screen no
print "result=GUARD_TRIP" append ${summary_file} screen no
write_restart ${out}/restart/restart_guard_${g_step}.bin
label branch_end
print "BRANCH_SCRIPT_END arm=${br_arm}"
# <<< block guard_stop
